// COMSOL Multiphysics 5.2.1.262 model "P2D-NLEIS.mph"
// P2d-harmonics2
// Outline of the model tree
// Components: comp1 "Macroscopic", comp2 "Microscopic"

Parameters
  l_neg = 8.8e-05[m]
  l_sep = 2.5e-05[m]
  l_pos = 8e-05[m]
  Rp_neg = 2e-06[m]
  Rp_pos = 2e-06[m]
  epsilon_f_neg = 0.0326[1]
  epsilon_f_pos = 0.025[1]
  epsilon_neg = 0.485[1]
  epsilon_sep = 0.724[1]
  epsilon_pos = 0.385[1]
  Cdl_neg = 10[uF/cm^2]
  Cdl_pos = 25[uF/cm^2]
  c0 = 1000[mol/m^3]
  D = 1.5e-10[m^2/s]
  Ds_neg = 3.9e-14[m^2/s]
  Ds_pos = 1e-14[m^2/s]
  dUdcp_pos = -10[V*cm^3/mol]
  dUdcp_neg = 0[V*cm^3/mol]
  d2Udcp2_pos = 0[V*cm^6/mol^2]
  d2Udcp2_neg = -100[V*cm^6/mol^2]
  i0_neg = 29.7[A/m^2]
  i0_pos = 33.03[A/m^2]
  tP = 0.364[1]
  aa_neg = 0.5[1]
  aa_pos = 0.5[1]
  kappa_0 = 0.20474[S/m]
  sigma_neg = 100[S/m]
  sigma_pos = 100[S/m]
  Brugg = 4
  delta_I = -1[A/m^2]
  R = 8.314[J/mol/K]
  T = 298.15[K]
  F = 96487[C/mol]
  f = 1[Hz]

Variables
  var2 "Negative" [comp1] on domains 1
    epsilon = epsilon_neg
    epsilon_f = epsilon_f_neg
    a = (3/Rp_neg)*(1-epsilon-epsilon_f)
    aa = aa_neg
    ac = ac_neg
    Deff = D*(epsilon^Brugg)
    sigmaeff = sigma_neg*(1-epsilon-epsilon_f)^Brugg
    kappaeff = kappa_0*(epsilon^Brugg)
    Cdl = Cdl_neg
    i0 = i0_neg
    dUdcp = dUdcp_neg  // OCV_Carbon_d1(cs0_neg/ct_neg)
    cpc11_s = comp2.linext_neg(comp2.cpc11)  // Scaled [comp2.linext_negScaled(comp2.cpc11)] -- comp2.linext_neg(comp2.cpc11)
    cps11_s = comp2.linext_neg(comp2.cps11)  // Scaled [comp2.linext_negScaled(comp2.cps11)] -- comp2.linext_neg(comp2.cps11)
    jfc11 = -(((aa + ac)*i0*(dUdcp*cpc11_s + phi2c11 - phi1c11))/(R*T))
    jfs11 = -(((aa + ac)*i0*(dUdcp*cps11_s + phi2s11 - phi1s11))/(R*T))
    jdlc11 = (Cdl*omega*(-phi2s11 + phi1s11))/F
    jdls11 = (Cdl*omega*(phi2c11 - phi1c11))/F
    d2Udcp2 = d2Udcp2_neg
    cpc22_s = comp2.linext_neg(comp2.cpc22)
    cps22_s = comp2.linext_neg(comp2.cps22)
    jfc22 = ((aa + ac)*i0*(((aa - ac)*dUdcp^2*F - d2Udcp2*R*T)*cpc11_s^2 - 4*dUdcp*R*T*cpc22_s - aa*dUdcp^2*F*cps11_s^2 + ac*dUdcp^2*F*cps11_s^2 + d2Udcp2*R*T*cps11_s^2 + aa*F*phi2c11^2 - ac*F*phi2c11^2 - 4*R*T*phi2c22 - 2*aa*dUdcp*F*cps11_s*phi2s11 + 2*ac*dUdcp*F*cps11_s*phi2s11 - aa*F*phi2s11^2 + ac*F*phi2s11^2 + 2*(aa - ac)*dUdcp*F*cpc11_s*(phi2c11 - phi1c11) - 2*aa*F*phi2c11*phi1c11 + 2*ac*F*phi2c11*phi1c11 + aa*F*phi1c11^2 - ac*F*phi1c11^2 + 4*R*T*phi1c22 + 2*(aa - ac)*F*(dUdcp*cps11_s + phi2s11)*phi1s11 + (-aa + ac)*F*phi1s11^2))/(4*R^2*T^2)
    jfs22 = ((aa + ac)*i0*(-2*dUdcp*R*T*cps22_s + cpc11_s*(((aa - ac)*dUdcp^2*F - d2Udcp2*R*T)*cps11_s + (aa - ac)*dUdcp*F*(phi2s11 - phi1s11)) + (aa - ac)*F*(phi2c11 - phi1c11)*(dUdcp*cps11_s + phi2s11 - phi1s11) + 2*R*T*(-phi2s22 + phi1s22)))/(2*R^2*T^2)
    jdlc22 = (2*Cdl*omega*(-phi2s22 + phi1s22))/F
    jdls22 = (2*Cdl*omega*(phi2c22 - phi1c22))/F
  var3 "Separator" [comp1] on domains 2
    epsilon = epsilon_sep
    a = 0
    Deff = D*epsilon^Brugg
    kappaeff = kappa_0*(epsilon^Brugg)
    sigmaeff = 0
    Cdl = 0
    jfc11 = 0[mol/s/m^2]
    jfs11 = 0[mol/s/m^2]
    jdlc11 = 0[mol/s/m^2]
    jdls11 = 0[mol/s/m^2]
    dUdcp = 0
    jfc22 = 0[mol/s/m^2]
    jfs22 = 0[mol/s/m^2]
    jdlc22 = 0[mol/s/m^2]
    jdls22 = 0[mol/s/m^2]
    d2Udcp2 = 0
    i0 = 0
    cpc11_s = 0
    cps11_s = 0
    cpc22_s = 0
    cps22_s = 0
    i2c11 = delta_I
    i2s11 = 0[A/m^2]
    i2c22 = 0[A/m^2]
    i2s22 = 0[A/m^2]
  var4 "Positive" [comp1] on domains 3
    epsilon = epsilon_pos
    epsilon_f = epsilon_f_pos
    a = (3/Rp_pos)*(1-epsilon-epsilon_f)
    aa = aa_pos
    ac = ac_pos
    Deff = D*(epsilon^Brugg)
    sigmaeff = sigma_pos*(1-epsilon-epsilon_f)^Brugg
    kappaeff = kappa_0*(epsilon^Brugg)
    Cdl = Cdl_pos
    i0 = i0_pos
    dUdcp = dUdcp_pos
    cpc11_s = comp2.linext_pos(comp2.cpc11)  // Scaled [comp2.linext_posScaled(comp2.cpc11)] -- comp2.linext_pos(comp2.cpc11)
    cps11_s = comp2.linext_pos(comp2.cps11)  // Scaled [comp2.linext_posScaled(comp2.cps11)] -- comp2.linext_pos(comp2.cps11)
    jfc11 = -(((aa + ac)*i0*(dUdcp*cpc11_s + phi2c11 - phi1c11))/(R*T))
    jfs11 = -(((aa + ac)*i0*(dUdcp*cps11_s + phi2s11 - phi1s11))/(R*T))
    jdlc11 = (Cdl*omega*(-phi2s11 + phi1s11))/F
    jdls11 = (Cdl*omega*(phi2c11 - phi1c11))/F
    d2Udcp2 = d2Udcp2_pos
    cpc22_s = comp2.linext_pos(comp2.cpc22)
    cps22_s = comp2.linext_pos(comp2.cps22)
    jfc22 = ((aa + ac)*i0*(((aa - ac)*dUdcp^2*F - d2Udcp2*R*T)*cpc11_s^2 - 4*dUdcp*R*T*cpc22_s - aa*dUdcp^2*F*cps11_s^2 + ac*dUdcp^2*F*cps11_s^2 + d2Udcp2*R*T*cps11_s^2 + aa*F*phi2c11^2 - ac*F*phi2c11^2 - 4*R*T*phi2c22 - 2*aa*dUdcp*F*cps11_s*phi2s11 + 2*ac*dUdcp*F*cps11_s*phi2s11 - aa*F*phi2s11^2 + ac*F*phi2s11^2 + 2*(aa - ac)*dUdcp*F*cpc11_s*(phi2c11 - phi1c11) - 2*aa*F*phi2c11*phi1c11 + 2*ac*F*phi2c11*phi1c11 + aa*F*phi1c11^2 - ac*F*phi1c11^2 + 4*R*T*phi1c22 + 2*(aa - ac)*F*(dUdcp*cps11_s + phi2s11)*phi1s11 + (-aa + ac)*F*phi1s11^2))/(4*R^2*T^2)
    jfs22 = ((aa + ac)*i0*(-2*dUdcp*R*T*cps22_s + cpc11_s*(((aa - ac)*dUdcp^2*F - d2Udcp2*R*T)*cps11_s + (aa - ac)*dUdcp*F*(phi2s11 - phi1s11)) + (aa - ac)*F*(phi2c11 - phi1c11)*(dUdcp*cps11_s + phi2s11 - phi1s11) + 2*R*T*(-phi2s22 + phi1s22)))/(2*R^2*T^2)
    jdlc22 = (2*Cdl*omega*(-phi2s22 + phi1s22))/F
    jdls22 = (2*Cdl*omega*(phi2c22 - phi1c22))/F
  var6 "Negative" [comp2] on domains 1
    D_s = Ds_neg
    R_p = Rp_neg
  var7 "Positive" [comp2] on domains 2
    D_s = Ds_pos
    R_p = Rp_pos
  var8 "Derivatives" [comp1]
    dcc11 = d(cc11,x)
    ddcc11 = d(dcc11,x)
    dcs11 = d(cs11,x)
    ddcs11 = d(dcs11,x)
    dcc22 = d(cc22,x)
    ddcc22 = d(dcc22,x)
    dcs22 = d(cs22,x)
    ddcs22 = d(dcs22,x)
  var10 "Transfer Coefficients"
    ac_neg = 1 - aa_neg
    ac_pos = 1 - aa_pos
  var11 "Frequency"
    omega = 2*pi*f

Couplings
  linext3: LinearExtrusion "Bottom_Left" (disabled) on boundaries 2
    opname = linext_negScaled
    srcvertex1 = points 1
    srcvertex2 = points 3
    dstvertex1 = boundaries 1
    dstvertex2 = boundaries 2
    dstgeom = geom1
  linext4: LinearExtrusion "Bottom_Right" (disabled) on boundaries 6
    opname = linext_posScaled
    srcvertex1 = points 5
    srcvertex2 = points 7
    dstvertex1 = boundaries 3
    dstvertex2 = boundaries 4
    dstgeom = geom1
  linext5: LinearExtrusion "Top_Left" on boundaries 3
    opname = linext_neg
    srcvertex1 = points 2
    srcvertex2 = points 4
    dstvertex1 = boundaries 1
    dstvertex2 = boundaries 2
    dstgeom = geom1
  linext6: LinearExtrusion "Top_Right" on boundaries 7
    opname = linext_pos
    srcvertex1 = points 6
    srcvertex2 = points 8
    dstvertex1 = boundaries 3
    dstvertex2 = boundaries 4
    dstgeom = geom1
  linext7: LinearExtrusion "negPE" on domains 1
    opname = linext_neg
    srcvertex1 = boundaries 1
    srcvertex2 = boundaries 2
    dstvertex1 = points 2
    dstvertex2 = points 4
    dstgeom = geom2
  linext8: LinearExtrusion "posPE" on domains 3
    opname = linext_pos
    srcvertex1 = boundaries 3
    srcvertex2 = boundaries 4
    dstvertex1 = points 6
    dstvertex2 = points 8
    dstgeom = geom2

Probes
  pdom1: DomainPoint "x = L" [comp1] | bndsnap1 = on
    ppb1: PointExpr "phic11_L" | probename = probe_phic11_L; expr = phi1c11; unit = V; table = tbl4
    ppb3: PointExpr "phis11_L" | probename = probe_phis11_L; expr = phi1s11; unit = V; table = tbl4
    ppb7: PointExpr "phic22_L" | probename = probe_phic22_L; expr = phi1c22; table = tbl4
    ppb8: PointExpr "phis22_L" | probename = probe_phis22_L; expr = phi1s22; table = tbl4
    ppb11: PointExpr "phic33_L" (disabled) | probename = probe_phic33_L; expr = phi1c33; table = tbl4
    ppb12: PointExpr "phis33_L" (disabled) | probename = probe_phis33_L; expr = phi1s33; table = tbl4
  pdom2: DomainPoint "x = 0" [comp1]
    ppb2: PointExpr "phic11_0" | probename = probe_phic11_0; expr = phi1c11; unit = V; table = tbl4
    ppb4: PointExpr "phis11_0" | probename = probe_phis11_0; expr = phi1s11; unit = V; table = tbl4
    ppb9: PointExpr "phic22_0" | probename = probe_phic22_0; expr = phi1c22; table = tbl4
    ppb10: PointExpr "phis22_0" | probename = probe_phis22_0; expr = phi1s22; table = tbl4
    ppb13: PointExpr "phic33_0" (disabled) | probename = probe_phic33_0; expr = phi1c33; table = tbl4
    ppb14: PointExpr "phis33_0" (disabled) | probename = probe_phis33_0; expr = phi1s33; table = tbl4
  var1: GlobalVariable "V_11_real" [comp1] | probename = Vc11; expr = probe_phic11_L-probe_phic11_0; table = tbl5
  var2: GlobalVariable "V_11_imag" [comp1]
    probename = Vs11
    expr = probe_phis11_L-probe_phis11_0
    unit = V
    table = tbl5
  var3: GlobalVariable "V_22_real" [comp1] | probename = Vc22; expr = probe_phic22_L-probe_phic22_0; table = tbl5
  var4: GlobalVariable "V_22_imag" [comp1] | probename = Vs22; expr = probe_phis22_L-probe_phis22_0; table = tbl5

Geometry
  geom1 "Geometry 1" [comp1] (1D, length unit m)
    i1: Interval "Anode" | p2 = l_neg; p = {0, l_neg}
    i2: Interval "Separator" | p1 = l_neg; p2 = l_neg+l_sep; p = {l_neg, l_neg+l_sep}
    i3: Interval "Cathode" | p1 = l_neg+l_sep; p2 = l_neg+l_sep+l_pos; p = {l_neg+l_sep, l_neg+l_sep+l_pos}
    fin: Finalize "Form Union"
  geom2 "Geometry 2" [comp2] (2D, length unit m)
    r1: Rectangle "Negative_Scaled" | size = {l_neg, Rp_neg}
    r2: Rectangle "Positive_Scaled" | pos = {l_neg+l_sep, 0}; size = {l_pos, Rp_pos}
    r3: Rectangle "Negative" (disabled) | size = {l_neg, R_pneg}
    r4: Rectangle "Positive" (disabled) | pos = {l_neg+l_sep, 0}; size = {l_pos, R_ppos}
    fin: Finalize "Form Union"

Physics
  c: CoefficientFormPDE "ceqn1c" [geom1] on all domains
    dependent variable cc11
    Units.DependentVariableQuantity = concentration
    Units.SourceTermQuantity = reactionrate
    Units.CustomSourceTermUnit = mol/m^5
    cfeq1: CoefficientFormPDE "Material Balance" (default)
      c = -Deff
      f = (epsilon*omega*cs11 + a*(-1 + tP)*(jdlc11 + jfc11))
      da = 0
    zflx1: ZeroFluxBoundary "Zero Flux 1" (default)
    init1: init "Initial Values 1" (default)
  phys1: CoefficientFormPDE "ceqn1s" [geom1] on all domains
    dependent variable cs11
    Units.DependentVariableQuantity = concentration
    Units.SourceTermQuantity = reactionrate
    Units.CustomSourceTermUnit = mol/m^5
    cfeq1: CoefficientFormPDE "Material Balance" (default)
      c = -Deff
      f = (-(epsilon*omega*cc11) + a*(-1 + tP)*(jdls11 + jfs11))
      da = 0
    zflx1: ZeroFluxBoundary "Zero Flux 1" (default)
    init1: init "Initial Values 1" (default)
  phys43: CoefficientFormPDE "i2eqn1c" [geom1] on domains 1, 3
    dependent variable i2c11
    Units.DependentVariableQuantity = currentdensity
    Units.SourceTermQuantity = currentsource
    cfeq1: CoefficientFormPDE (default) | c = 0; f = a*F*(jdlc11 + jfc11); da = 0; be = 1
    zflx1: ZeroFluxBoundary "Zero Flux 1" (default)
    init1: init "Initial Values 1" (default)
    dir1: DirichletBoundary "Dirichlet Boundary Condition 1" on boundaries 2, 3 | r = delta_I
    dir2: DirichletBoundary "Dirichlet Boundary Condition 2" on boundaries 1, 4 | r = 0
  phys44: CoefficientFormPDE "i2eqn1s" [geom1] on domains 1, 3
    dependent variable i2s11
    Units.DependentVariableQuantity = currentdensity
    Units.SourceTermQuantity = currentsource
    cfeq1: CoefficientFormPDE (default) | c = 0; f = a*F*(jdls11 + jfs11); da = 0; be = 1
    zflx1: ZeroFluxBoundary "Zero Flux 1" (default)
    init1: init "Initial Values 1" (default)
    dir1: DirichletBoundary "Dirichlet Boundary Condition 1" on boundaries 1-4 | r = 0
  c2: CoefficientFormPDE "phi2eqn1c" [geom1] on domains 1-3
    dependent variable phi2c11
    Units.DependentVariableQuantity = electricpotential
    Units.SourceTermQuantity = currentdensity
    Units.CustomSourceTermUnit = V/m^2
    cfeq1: CoefficientFormPDE "Equation 2" (default)
      c = 0
      f = -(i2c11) - (2*kappaeff*R*T*(-1 + tP)*d(cc11,x))/(c0*F)
      da = 0
      be = kappaeff
    zflx1: ZeroFluxBoundary "Zero Flux 1" (default)
    init1: init "Initial Values 1" (default)
    dir1: DirichletBoundary "Dirichlet Boundary Condition 1" on boundaries 1 | r = 0
    cons1: Constraint on boundaries 4 | R = -kappaeff*d(phi2c11,x) + 2*kappaeff*R*T*(1-tP)*d(cc11,x)/(c0*F)
  phys2: CoefficientFormPDE "phi2eqn1s" [geom1] on domains 1-3
    dependent variable phi2s11
    Units.DependentVariableQuantity = electricpotential
    Units.SourceTermQuantity = currentdensity
    Units.CustomSourceTermUnit = V/m^2
    cfeq1: CoefficientFormPDE (default)
      c = 0
      f = -(i2s11) - (2*kappaeff*R*T*(-1 + tP)*d(cs11,x))/(c0*F)
      da = 0
      be = kappaeff
    zflx1: ZeroFluxBoundary "Zero Flux 1" (default)
    init1: init "Initial Values 1" (default)
    dir1: DirichletBoundary "Dirichlet Boundary Condition 1" on boundaries 1 | r = 0
    cons1: Constraint on boundaries 4 | R = -kappaeff*d(phi2s11,x) + 2*kappaeff*R*T*(1-tP)*d(cs11,x)/(c0*F)
  c3: CoefficientFormPDE "phi1eqn1c" [geom1] on domains 1, 3
    dependent variable phi1c11
    Units.DependentVariableQuantity = electricpotential
    Units.SourceTermQuantity = currentdensity
    Units.CustomSourceTermUnit = V/m^2
    cfeq1: CoefficientFormPDE "Equation 3" (default) | c = 0; f = (-delta_I + i2c11); da = 0; be = sigmaeff
    zflx1: ZeroFluxBoundary "Zero Flux 1" (default)
    init1: init "Initial Values 1" (default)
    cons1: Constraint on boundaries 2, 3 | R = d(phi1c11,x)
    cons2: Constraint on boundaries 1, 4 | R = sigmaeff*d(phi1c11,x) + delta_I
  phys3: CoefficientFormPDE "phi1eqn1s" [geom1] on domains 1, 3
    dependent variable phi1s11
    Units.DependentVariableQuantity = electricpotential
    Units.SourceTermQuantity = currentdensity
    Units.CustomSourceTermUnit = V/m^2
    cfeq1: CoefficientFormPDE (default) | c = 0; f = i2s11; da = 0; be = sigmaeff
    zflx1: ZeroFluxBoundary "Zero Flux 1" (default)
    init1: init "Initial Values 1" (default)
    cons1: Constraint on boundaries 1-4 | R = d(phi1s11,x)
  phys5: CoefficientFormPDE "ceqn2c" [geom1] on all domains
    dependent variable cc22
    Units.DependentVariableQuantity = concentration
    Units.SourceTermQuantity = reactionrate
    Units.CustomSourceTermUnit = mol/m^5
    cfeq1: CoefficientFormPDE (default) | c = -Deff; f = (2*epsilon*omega*cs22 + a*(-1 + tP)*(jdlc22 + jfc22)); da = 0
    zflx1: ZeroFluxBoundary "Zero Flux 1" (default)
    init1: init "Initial Values 1" (default)
  phys6: CoefficientFormPDE "ceqn2s" [geom1] on all domains
    dependent variable cs22
    Units.DependentVariableQuantity = concentration
    Units.SourceTermQuantity = reactionrate
    Units.CustomSourceTermUnit = mol/m^5
    cfeq1: CoefficientFormPDE (default) | c = -Deff; f = (-2*epsilon*omega*cc22 + a*(-1 + tP)*(jdls22 + jfs22)); da = 0
    zflx1: ZeroFluxBoundary "Zero Flux 1" (default)
    init1: init "Initial Values 1" (default)
  phys45: CoefficientFormPDE "i2eqn2c" [geom1] on domains 1, 3
    dependent variable i2c22
    Units.DependentVariableQuantity = currentdensity
    Units.SourceTermQuantity = currentsource
    cfeq1: CoefficientFormPDE (default) | c = 0; f = a*F*(jdlc22 + jfc22); da = 0; be = 1
    zflx1: ZeroFluxBoundary "Zero Flux 1" (default)
    init1: init "Initial Values 1" (default)
    dir1: DirichletBoundary "Dirichlet Boundary Condition 1" on boundaries 1-4 | r = 0
  phys46: CoefficientFormPDE "i2eqn2s" [geom1] on domains 1, 3
    dependent variable i2s22
    Units.DependentVariableQuantity = currentdensity
    Units.SourceTermQuantity = currentsource
    cfeq1: CoefficientFormPDE (default) | c = 0; f = a*F*(jdls22 + jfs22); da = 0; be = 1
    zflx1: ZeroFluxBoundary "Zero Flux 1" (default)
    init1: init "Initial Values 1" (default)
    dir1: DirichletBoundary "Dirichlet Boundary Condition 1" on boundaries 1-4 | r = 0
  phys9: CoefficientFormPDE "phi2eqn2c" [geom1] on all domains
    dependent variable phi2c22
    Units.DependentVariableQuantity = electricpotentialionicphase
    Units.SourceTermQuantity = currentdensity
    Units.CustomSourceTermUnit = V/m^2
    cfeq1: CoefficientFormPDE (default)
      c = 0
      f = (-(c0^2*F*i2c22) + R*T*(-1 + tP)*kappaeff*(cc11*d(cc11,x) - 2*c0*d(cc22,x) - cs11*d(cs11,x)))/(c0^2*F)
      da = 0
      be = kappaeff
    zflx1: ZeroFluxBoundary "Zero Flux 1" (default)
    init1: init "Initial Values 1" (default)
    dir1: DirichletBoundary "Dirichlet Boundary Condition 1" on boundaries 1 | r = 0
    cons1: Constraint on boundaries 4 | R = -kappaeff*d(phi2c22,x) + 2*kappaeff*R*T*(1-tP)*d(cc22,x)/(c0*F)
  c4: CoefficientFormPDE "phi2eqn2s" [geom1] on all domains
    dependent variable phi2s22
    Units.DependentVariableQuantity = electricpotentialionicphase
    Units.SourceTermQuantity = currentdensity
    Units.CustomSourceTermUnit = V/m^2
    cfeq1: CoefficientFormPDE (default)
      c = 0
      f = (-(c0^2*F*i2s22) + R*T*(-1 + tP)*kappaeff*(cs11*d(cc11,x) + cc11*d(cs11,x) - 2*c0*d(cs22,x)))/(c0^2*F)
      da = 0
      be = kappaeff
    zflx1: ZeroFluxBoundary "Zero Flux 1" (default)
    init1: init "Initial Values 1" (default)
    dir1: DirichletBoundary "Dirichlet Boundary Condition 1" on boundaries 1 | r = 0
    cons1: Constraint on boundaries 4 | R = -kappaeff*d(phi2s22,x) + 2*kappaeff*R*T*(1-tP)*d(cs22,x)/(c0*F)
  phys7: CoefficientFormPDE "phi1eqn2c" [geom1] on domains 1, 3
    dependent variable phi1c22
    Units.DependentVariableQuantity = electricpotential
    Units.SourceTermQuantity = currentdensity
    Units.CustomSourceTermUnit = V/m^2
    cfeq1: CoefficientFormPDE (default) | c = 0; f = i2c22; da = 0; be = sigmaeff
    zflx1: ZeroFluxBoundary "Zero Flux 1" (default)
    init1: init "Initial Values 1" (default)
    cons1: Constraint on boundaries 1-4 | R = d(phi1c22,x)
  phys8: CoefficientFormPDE "phi1eqn2s" [geom1] on domains 1, 3
    dependent variable phi1s22
    Units.DependentVariableQuantity = electricpotential
    Units.SourceTermQuantity = currentdensity
    Units.CustomSourceTermUnit = V/m^2
    cfeq1: CoefficientFormPDE (default) | c = 0; f = i2s22; da = 0; be = sigmaeff
    zflx1: ZeroFluxBoundary "Zero Flux 1" (default)
    init1: init "Initial Values 1" (default)
    cons1: Constraint on boundaries 1-4 | R = d(phi1s22,x)
  phys37: CoefficientFormPDE "cpeqn1c" [geom2] on all domains
    dependent variable cpc11
    Units.DependentVariableQuantity = concentration
    Units.CustomSourceTermUnit = mol/m/s
    cfeq1: CoefficientFormPDE (default) | c = {0, 0, 0, 0}; f = (y^2)*omega*cps11; da = 0; ga = {0, D_s*y^2*d(cpc11,y)}
    zflx1: ZeroFluxBoundary "Zero Flux 1" (default)
    init1: init "Initial Values 1" (default)
    flux1: FluxBoundary "Flux/Source 1" on boundaries 3 | g = (Rp_neg^2)*comp1.linext_neg(comp1.jfc11)
    flux2: FluxBoundary "Flux/Source 2" on boundaries 7 | g = (Rp_pos^2)*comp1.linext_pos(comp1.jfc11)
  phys38: CoefficientFormPDE "cpeqn1s" [geom2] on all domains
    dependent variable cps11
    Units.DependentVariableQuantity = concentration
    Units.CustomSourceTermUnit = mol/m/s
    cfeq1: CoefficientFormPDE (default) | c = {0, 0, 0, 0}; f = -(y^2)*omega*cpc11; da = 0; ga = {0, D_s*y^2*d(cps11,y)}
    zflx1: ZeroFluxBoundary "Zero Flux 1" (default)
    init1: init "Initial Values 1" (default)
    flux1: FluxBoundary "Flux/Source 1" on boundaries 3 | g = (Rp_neg^2)*comp1.linext_neg(comp1.jfs11)
    flux2: FluxBoundary "Flux/Source 2" on boundaries 7 | g = (Rp_pos^2)*comp1.linext_pos(comp1.jfs11)
  phys39: CoefficientFormPDE "cpeqn2c" [geom2] on all domains
    dependent variable cpc22
    Units.DependentVariableQuantity = concentration
    Units.CustomSourceTermUnit = mol/m/s
    cfeq1: CoefficientFormPDE (default) | c = {0, 0, 0, 0}; f = 2*(y^2)*omega*cps22; da = 0; ga = {0, D_s*y^2*d(cpc22,y)}
    zflx1: ZeroFluxBoundary "Zero Flux 1" (default)
    init1: init "Initial Values 1" (default)
    flux1: FluxBoundary "Flux/Source 1" on boundaries 3 | g = (Rp_neg^2)*comp1.linext_neg(comp1.jfc22)
    flux2: FluxBoundary "Flux/Source 2" on boundaries 7 | g = (Rp_pos^2)*comp1.linext_pos(comp1.jfc22)
  phys40: CoefficientFormPDE "cpeqn2s" [geom2] on all domains
    dependent variable cps22
    Units.DependentVariableQuantity = concentration
    Units.CustomSourceTermUnit = mol/m/s
    cfeq1: CoefficientFormPDE (default) | c = {0, 0, 0, 0}; f = -2*(y^2)*omega*cpc22; da = 0; ga = {0, D_s*y^2*d(cps22,y)}
    zflx1: ZeroFluxBoundary "Zero Flux 1" (default)
    init1: init "Initial Values 1" (default)
    flux1: FluxBoundary "Flux/Source 1" on boundaries 3 | g = (Rp_neg^2)*comp1.linext_neg(comp1.jfs22)
    flux2: FluxBoundary "Flux/Source 2" on boundaries 7 | g = (Rp_pos^2)*comp1.linext_pos(comp1.jfs22)

Mesh
  mesh1 "Mesh 1" [geom1]
    size: MeshSizeDefault | hmax = 1E-6; hmin = 9.86E-9; hauto = 1; custom = on
    edg1: Edge on entire geometry
      dis1: Distribution on domains 3 | type = predefined; elemcount = 200; elemratio = 50
      dis2: Distribution on domains 2 | type = predefined; elemcount = 100; elemratio = 25; symmetric = on
      dis3: Distribution on domains 1 | type = predefined; elemcount = 200; elemratio = 50; reverse = on
  mesh10 "Mesh" [geom2]
    size: MeshSizeDefault | hauto = 1
    edg4: Edge "Horiz_Pos" on boundaries 6, 7
      size1: Size (disabled) on boundaries 6, 7 | hmax = l_pos/100; hauto = 5; custom = on
      dis1: Distribution on boundaries 6, 7
        type = predefined
        elemcount = 50
        elemratio = 50
        method = arithmetic
        reverse = on
    edg2: Edge "Horiz_Neg" on boundaries 2, 3
      size1: Size (disabled) on boundaries 2, 3 | hmax = l_pos/100; hauto = 5; custom = on
      dis1: Distribution on boundaries 2, 3 | type = predefined; elemcount = 50; elemratio = 50; method = arithmetic
    edg5: Edge on boundaries 5, 8
      dis1: Distribution on boundaries 5, 8
        type = predefined
        elemcount = 200
        elemratio = 20
        method = geometric
        reverse = on
    edg3: Edge on boundaries 1, 4
      dis1: Distribution on boundaries 1, 4
        type = predefined
        elemcount = 200
        elemratio = 20
        method = geometric
        reverse = on
    map1: Map "Mapped 1" on entire geometry

Studies
  std1 "Study 1"
    param: Parametric "Parametric Sweep"
      pname = f
      plistarr = 10^range(5,-(1/3),-3)
      useaccumtable = on
      accumtable = tbl6
    stat: Stationary "Stationary, Linear Harmonics (1,1)"
      solve for = {c, phys1, phys43, phys44, c2, phys2, c3, phys3, phys37, phys38}
    stat2: Stationary "Stationary, Second Harmonics (2,2)"
      solve for = {phys5, phys6, phys45, phys46, phys9, c4, phys7, phys8, phys39, phys40}
      usesol = on
      notsolmethod = sol
      notstudy = std1

Solver configurations
  sol1 "Solver 1" (study std1)
    v1: Variables "Dependent Variables 1"
    s1: Stationary "Stationary Solver 1"
      dDef: Direct
      fc1: FullyCoupled
    v2: Variables "Dependent Variables 2" | initmethod = sol; notsolmethod = sol
    s2: Stationary "Stationary Solver 2"
      dDef: Direct
      fc1: FullyCoupled
    v3: Variables "Dependent Variables 3" | initmethod = sol; notsolmethod = sol
    s3: Stationary "Stationary Solver 3"
      dDef: Direct
      fc1: FullyCoupled
  sol2 "Parametric Solutions 1" (study std1)

Datasets
  an1_ds1: Grid1D "Function 1D 1" | function = all; par1 = x; data = dset1
  dset1: Solution | solution = sol1
  dset2: Solution | solution = sol1
  dset7: Solution "Probe Solution 7" | solution = sol1
  cpt1: CutPoint1D "x = L" | data = dset7; pointx = l_neg+l_sep+l_pos
  cpt2: CutPoint1D "x = 0" | data = dset7
  dset8: Solution | solution = sol2
  dset9: Solution | solution = sol2

Derived values
  pev1: EvalPoint "phic11_L" | data = cpt1; table = tbl6; expr = phi1c11
  pev2: EvalPoint "phis11_L" | data = cpt1; table = tbl6; expr = phi1s11
  pev3: EvalPoint "phic22_L" | data = cpt1; table = tbl6; expr = phi1c22
  pev4: EvalPoint "phis22_L" | data = cpt1; table = tbl6; expr = phi1s22
  pev5: EvalPoint "phic33_L" | data = cpt1; table = tbl4; expr = phi1c33
  pev6: EvalPoint "phis33_L" | data = cpt1; table = tbl4; expr = phi1s33
  pev7: EvalPoint "phic11_0" | data = cpt2; table = tbl6; expr = phi1c11
  pev8: EvalPoint "phis11_0" | data = cpt2; table = tbl6; expr = phi1s11
  pev9: EvalPoint "phic22_0" | data = cpt2; table = tbl6; expr = phi1c22
  pev10: EvalPoint "phis22_0" | data = cpt2; table = tbl6; expr = phi1s22
  pev11: EvalPoint "phic33_0" | data = cpt2; table = tbl4; expr = phi1c33
  pev12: EvalPoint "phis33_0" | data = cpt2; table = tbl4; expr = phi1s33
  gev1: EvalGlobal "V_11_real" | data = dset7; table = tbl6; expr = probe_phic11_L-probe_phic11_0
  gev2: EvalGlobal "V_11_imag" | data = dset7; table = tbl6; expr = probe_phis11_L-probe_phis11_0
  gev3: EvalGlobal "V_22_real" | data = dset7; table = tbl6; expr = probe_phic22_L-probe_phic22_0
  gev4: EvalGlobal "V_22_imag" | data = dset7; table = tbl6; expr = probe_phis22_L-probe_phis22_0

Plots
  pg1: PlotGroup1D "Probe Plot Group 1"
    tblp1: Table "Probe Table Graph 1" | table = tbl4
  pg2: PlotGroup1D "Probe Plot Group 2"
    tblp1: Table "Probe Table Graph 1" | table = tbl4
  pg3: PlotGroup1D "Probe Plot Group 3"
    tblp1: Table "Probe Table Graph 1" | table = tbl4
  pg4: PlotGroup1D "Probe Plot Group 4"
    tblp1: Table "Probe Table Graph 1" | table = tbl4
    tblp2: Table "Probe Table Graph 2" | table = tbl5